<neuroml xmlns="http://www.neuroml.org/schema/neuroml2"  xmlns:xs="http://www.w3.org/2001/XMLSchema" xmlns:xsi="http://www.w3.org/2001/XMLSchema-instance" xsi:schemaLocation="http://www.neuroml.org/schema/neuroml2 https://raw.github.com/NeuroML/NeuroML2/development/Schemas/NeuroML2/NeuroML_v2.3.xsd" id="Microcircuit_0_2pcnt">
    <notes>
    This NeuroML 2 file has been generated from:
        PyNN v0.10.1
        libNeuroML v0.5.9
        pyNeuroML v1.2.7
    </notes>
    <IF_curr_exp id="IF_curr_exp_L23E" cm="0.25" i_offset="0.097491690511739" tau_syn_E="0.5" tau_syn_I="0.5" v_init="-65.0" tau_m="10.0" tau_refrac="2.0" v_reset="-65.0" v_rest="-65.0" v_thresh="-50.0"/>
    <IF_curr_exp id="IF_curr_exp_L23I" cm="0.25" i_offset="0.17014598161497" tau_syn_E="0.5" tau_syn_I="0.5" v_init="-65.0" tau_m="10.0" tau_refrac="2.0" v_reset="-65.0" v_rest="-65.0" v_thresh="-50.0"/>
    <IF_curr_exp id="IF_curr_exp_L4E" cm="0.25" i_offset="0.175268697955118" tau_syn_E="0.5" tau_syn_I="0.5" v_init="-65.0" tau_m="10.0" tau_refrac="2.0" v_reset="-65.0" v_rest="-65.0" v_thresh="-50.0"/>
    <IF_curr_exp id="IF_curr_exp_L4I" cm="0.25" i_offset="0.209650598537005" tau_syn_E="0.5" tau_syn_I="0.5" v_init="-65.0" tau_m="10.0" tau_refrac="2.0" v_reset="-65.0" v_rest="-65.0" v_thresh="-50.0"/>
    <IF_curr_exp id="IF_curr_exp_L5E" cm="0.25" i_offset="0.152641315228024" tau_syn_E="0.5" tau_syn_I="0.5" v_init="-65.0" tau_m="10.0" tau_refrac="2.0" v_reset="-65.0" v_rest="-65.0" v_thresh="-50.0"/>
    <IF_curr_exp id="IF_curr_exp_L5I" cm="0.25" i_offset="0.164610278753041" tau_syn_E="0.5" tau_syn_I="0.5" v_init="-65.0" tau_m="10.0" tau_refrac="2.0" v_reset="-65.0" v_rest="-65.0" v_thresh="-50.0"/>
    <IF_curr_exp id="IF_curr_exp_L6E" cm="0.25" i_offset="0.101144747232728" tau_syn_E="0.5" tau_syn_I="0.5" v_init="-65.0" tau_m="10.0" tau_refrac="2.0" v_reset="-65.0" v_rest="-65.0" v_thresh="-50.0"/>
    <IF_curr_exp id="IF_curr_exp_L6I" cm="0.25" i_offset="0.222428641750285" tau_syn_E="0.5" tau_syn_I="0.5" v_init="-65.0" tau_m="10.0" tau_refrac="2.0" v_reset="-65.0" v_rest="-65.0" v_thresh="-50.0"/>
    <expCurrSynapse id="syn__L23E__TO__L23E" tau_syn="0.5"/>
    <expCurrSynapse id="syn__L23I__TO__L23E" tau_syn="0.5"/>
    <expCurrSynapse id="syn__L4E__TO__L23E" tau_syn="0.5"/>
    <expCurrSynapse id="syn__L4I__TO__L23E" tau_syn="0.5"/>
    <expCurrSynapse id="syn__L5E__TO__L23E" tau_syn="0.5"/>
    <expCurrSynapse id="syn__L6E__TO__L23E" tau_syn="0.5"/>
    <expCurrSynapse id="syn__L23E__TO__L23I" tau_syn="0.5"/>
    <expCurrSynapse id="syn__L23I__TO__L23I" tau_syn="0.5"/>
    <expCurrSynapse id="syn__L4E__TO__L23I" tau_syn="0.5"/>
    <expCurrSynapse id="syn__L4I__TO__L23I" tau_syn="0.5"/>
    <expCurrSynapse id="syn__L5E__TO__L23I" tau_syn="0.5"/>
    <expCurrSynapse id="syn__L6E__TO__L23I" tau_syn="0.5"/>
    <expCurrSynapse id="syn__L23E__TO__L4E" tau_syn="0.5"/>
    <expCurrSynapse id="syn__L23I__TO__L4E" tau_syn="0.5"/>
    <expCurrSynapse id="syn__L4E__TO__L4E" tau_syn="0.5"/>
    <expCurrSynapse id="syn__L4I__TO__L4E" tau_syn="0.5"/>
    <expCurrSynapse id="syn__L5E__TO__L4E" tau_syn="0.5"/>
    <expCurrSynapse id="syn__L5I__TO__L4E" tau_syn="0.5"/>
    <expCurrSynapse id="syn__L6E__TO__L4E" tau_syn="0.5"/>
    <expCurrSynapse id="syn__L23E__TO__L4I" tau_syn="0.5"/>
    <expCurrSynapse id="syn__L23I__TO__L4I" tau_syn="0.5"/>
    <expCurrSynapse id="syn__L4E__TO__L4I" tau_syn="0.5"/>
    <expCurrSynapse id="syn__L4I__TO__L4I" tau_syn="0.5"/>
    <expCurrSynapse id="syn__L5E__TO__L4I" tau_syn="0.5"/>
    <expCurrSynapse id="syn__L6E__TO__L4I" tau_syn="0.5"/>
    <expCurrSynapse id="syn__L23E__TO__L5E" tau_syn="0.5"/>
    <expCurrSynapse id="syn__L23I__TO__L5E" tau_syn="0.5"/>
    <expCurrSynapse id="syn__L4E__TO__L5E" tau_syn="0.5"/>
    <expCurrSynapse id="syn__L4I__TO__L5E" tau_syn="0.5"/>
    <expCurrSynapse id="syn__L5E__TO__L5E" tau_syn="0.5"/>
    <expCurrSynapse id="syn__L5I__TO__L5E" tau_syn="0.5"/>
    <expCurrSynapse id="syn__L6E__TO__L5E" tau_syn="0.5"/>
    <expCurrSynapse id="syn__L23E__TO__L5I" tau_syn="0.5"/>
    <expCurrSynapse id="syn__L23I__TO__L5I" tau_syn="0.5"/>
    <expCurrSynapse id="syn__L4E__TO__L5I" tau_syn="0.5"/>
    <expCurrSynapse id="syn__L4I__TO__L5I" tau_syn="0.5"/>
    <expCurrSynapse id="syn__L5E__TO__L5I" tau_syn="0.5"/>
    <expCurrSynapse id="syn__L5I__TO__L5I" tau_syn="0.5"/>
    <expCurrSynapse id="syn__L6E__TO__L5I" tau_syn="0.5"/>
    <expCurrSynapse id="syn__L23E__TO__L6E" tau_syn="0.5"/>
    <expCurrSynapse id="syn__L23I__TO__L6E" tau_syn="0.5"/>
    <expCurrSynapse id="syn__L4E__TO__L6E" tau_syn="0.5"/>
    <expCurrSynapse id="syn__L4I__TO__L6E" tau_syn="0.5"/>
    <expCurrSynapse id="syn__L5E__TO__L6E" tau_syn="0.5"/>
    <expCurrSynapse id="syn__L5I__TO__L6E" tau_syn="0.5"/>
    <expCurrSynapse id="syn__L6E__TO__L6E" tau_syn="0.5"/>
    <expCurrSynapse id="syn__L6I__TO__L6E" tau_syn="0.5"/>
    <expCurrSynapse id="syn__L23E__TO__L6I" tau_syn="0.5"/>
    <expCurrSynapse id="syn__L23I__TO__L6I" tau_syn="0.5"/>
    <expCurrSynapse id="syn__L4E__TO__L6I" tau_syn="0.5"/>
    <expCurrSynapse id="syn__L4I__TO__L6I" tau_syn="0.5"/>
    <expCurrSynapse id="syn__L5E__TO__L6I" tau_syn="0.5"/>
    <expCurrSynapse id="syn__L5I__TO__L6I" tau_syn="0.5"/>
    <expCurrSynapse id="syn__L6E__TO__L6I" tau_syn="0.5"/>
    <expCurrSynapse id="syn__L6I__TO__L6I" tau_syn="0.5"/>
    <expCurrSynapse id="syn__Input_to_L23E__TO__L23E" tau_syn="0.5"/>
    <expCurrSynapse id="syn__Input_to_L23I__TO__L23I" tau_syn="0.5"/>
    <expCurrSynapse id="syn__Input_to_L4E__TO__L4E" tau_syn="0.5"/>
    <expCurrSynapse id="syn__Input_to_L4I__TO__L4I" tau_syn="0.5"/>
    <expCurrSynapse id="syn__Input_to_L5E__TO__L5E" tau_syn="0.5"/>
    <expCurrSynapse id="syn__Input_to_L5I__TO__L5I" tau_syn="0.5"/>
    <expCurrSynapse id="syn__Input_to_L6E__TO__L6E" tau_syn="0.5"/>
    <expCurrSynapse id="syn__Input_to_L6I__TO__L6I" tau_syn="0.5"/>
    <SpikeSourcePoisson id="SpikeSourcePoisson_Input_to_L23E" start="0.0ms" duration="10000000000.0ms" rate="1280.0Hz"/>
    <SpikeSourcePoisson id="SpikeSourcePoisson_Input_to_L23I" start="0.0ms" duration="10000000000.0ms" rate="1200.0Hz"/>
    <SpikeSourcePoisson id="SpikeSourcePoisson_Input_to_L4E" start="0.0ms" duration="10000000000.0ms" rate="1680.0Hz"/>
    <SpikeSourcePoisson id="SpikeSourcePoisson_Input_to_L4I" start="0.0ms" duration="10000000000.0ms" rate="1520.0Hz"/>
    <SpikeSourcePoisson id="SpikeSourcePoisson_Input_to_L5E" start="0.0ms" duration="10000000000.0ms" rate="1600.0Hz"/>
    <SpikeSourcePoisson id="SpikeSourcePoisson_Input_to_L5I" start="0.0ms" duration="10000000000.0ms" rate="1520.0Hz"/>
    <SpikeSourcePoisson id="SpikeSourcePoisson_Input_to_L6E" start="0.0ms" duration="10000000000.0ms" rate="2320.0Hz"/>
    <SpikeSourcePoisson id="SpikeSourcePoisson_Input_to_L6I" start="0.0ms" duration="10000000000.0ms" rate="1680.0Hz"/>
    <network id="Microcircuit_0_2pcnt">
        <population id="L23E" component="IF_curr_exp_L23E" size="41" type="populationList">
            <property tag="type" value="E"/>
            <property tag="radius" value="10"/>
            <property tag="structure" value="RandomStructure(boundary=Cuboid(width=44.721359549995796, height=501.6655078181848, depth=44.721359549995796), origin=(0, 1249.1672460909076, 0), rng=NumpyRNG(seed=None))"/>
            <instance id="0">
                <location x="-17.875227287192129" y="1283.830686195279213" z="-16.090252625674719"/>
            </instance>
            <instance id="1">
                <location x="-6.277793041340203" y="1078.716056499861907" z="-3.949706882415714"/>
            </instance>
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        </population>
        <population id="L23I" component="IF_curr_exp_L23I" size="11" type="populationList">
            <property tag="type" value="I"/>
            <property tag="radius" value="10"/>
            <property tag="structure" value="RandomStructure(boundary=Cuboid(width=44.721359549995796, height=501.6655078181848, depth=44.721359549995796), origin=(0, 1249.1672460909076, 0), rng=NumpyRNG(seed=None))"/>
            <instance id="0">
                <location x="-19.384911373512868" y="1207.630442396996159" z="17.845571973433653"/>
            </instance>
            <instance id="1">
                <location x="-0.182605277010331" y="1431.291665488858598" z="16.368242789729901"/>
            </instance>
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        </population>
        <population id="L4E" component="IF_curr_exp_L4E" size="43" type="populationList">
            <property tag="type" value="E"/>
            <property tag="radius" value="10"/>
            <property tag="structure" value="RandomStructure(boundary=Cuboid(width=44.721359549995796, height=531.5476286726065, depth=44.721359549995796), origin=(0, 732.560677845512, 0), rng=NumpyRNG(seed=None))"/>
            <instance id="0">
                <location x="14.997977528148844" y="513.942892188644578" z="-18.596095906410213"/>
            </instance>
            <instance id="1">
                <location x="-2.580467027875928" y="729.771154982939493" z="21.481720828663214"/>
            </instance>
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        </population>
        <population id="L4I" component="IF_curr_exp_L4I" size="10" type="populationList">
            <property tag="type" value="I"/>
            <property tag="radius" value="10"/>
            <property tag="structure" value="RandomStructure(boundary=Cuboid(width=44.721359549995796, height=531.5476286726065, depth=44.721359549995796), origin=(0, 732.560677845512, 0), rng=NumpyRNG(seed=None))"/>
            <instance id="0">
                <location x="6.866888366670024" y="794.479724480736081" z="0.892797747760199"/>
            </instance>
            <instance id="1">
                <location x="14.219095527413458" y="884.665378160127148" z="11.253301210142622"/>
            </instance>
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        </population>
        <population id="L5E" component="IF_curr_exp_L5E" size="9" type="populationList">
            <property tag="type" value="E"/>
            <property tag="radius" value="10"/>
            <property tag="structure" value="RandomStructure(boundary=Cuboid(width=44.721359549995796, height=117.63659589605938, depth=44.721359549995796), origin=(0, 407.9685655611791, 0), rng=NumpyRNG(seed=None))"/>
            <instance id="0">
                <location x="-4.924887114971766" y="395.912198168736381" z="-2.176520548090427"/>
            </instance>
            <instance id="1">
                <location x="10.504033873997111" y="379.499183889905112" z="5.432885148459449"/>
            </instance>
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        </population>
        <population id="L5I" component="IF_curr_exp_L5I" size="2" type="populationList">
            <property tag="type" value="I"/>
            <property tag="radius" value="10"/>
            <property tag="structure" value="RandomStructure(boundary=Cuboid(width=44.721359549995796, height=117.63659589605938, depth=44.721359549995796), origin=(0, 407.9685655611791, 0), rng=NumpyRNG(seed=None))"/>
            <instance id="0">
                <location x="-17.726415582033304" y="391.677565610860427" z="21.428566892412778"/>
            </instance>
            <instance id="1">
                <location x="15.332895582814299" y="359.542241681092662" z="-11.920175951706895"/>
            </instance>
        </population>
        <population id="L6E" component="IF_curr_exp_L6E" size="28" type="populationList">
            <property tag="type" value="E"/>
            <property tag="radius" value="10"/>
            <property tag="structure" value="RandomStructure(boundary=Cuboid(width=44.721359549995796, height=349.1502676131494, depth=44.721359549995796), origin=(0, 174.5751338065747, 0), rng=NumpyRNG(seed=None))"/>
            <instance id="0">
                <location x="7.399073183333323" y="175.658842333455794" z="17.547113422345188"/>
            </instance>
            <instance id="1">
                <location x="20.531368290276223" y="295.527668049987597" z="17.703357018620284"/>
            </instance>
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        </population>
        <population id="L6I" component="IF_curr_exp_L6I" size="5" type="populationList">
            <property tag="type" value="I"/>
            <property tag="radius" value="10"/>
            <property tag="structure" value="RandomStructure(boundary=Cuboid(width=44.721359549995796, height=349.1502676131494, depth=44.721359549995796), origin=(0, 174.5751338065747, 0), rng=NumpyRNG(seed=None))"/>
            <instance id="0">
                <location x="16.947321326439472" y="246.914166780148349" z="-7.026838293106397"/>
            </instance>
            <instance id="1">
                <location x="21.744832768659716" y="314.730878076923318" z="-8.387649820904727"/>
            </instance>
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        </population>
        <population id="Input_to_L23E" component="SpikeSourcePoisson_Input_to_L23E" size="41" type="populationList">
            <instance id="0">
                <location x="0.0" y="0.0" z="0.0"/>
            </instance>
            <instance id="1">
                <location x="1.0" y="0.0" z="0.0"/>
            </instance>
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        </population>
        <population id="Input_to_L23I" component="SpikeSourcePoisson_Input_to_L23I" size="11" type="populationList">
            <instance id="0">
                <location x="0.0" y="0.0" z="0.0"/>
            </instance>
            <instance id="1">
                <location x="1.0" y="0.0" z="0.0"/>
            </instance>
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        </population>
        <population id="Input_to_L4E" component="SpikeSourcePoisson_Input_to_L4E" size="43" type="populationList">
            <instance id="0">
                <location x="0.0" y="0.0" z="0.0"/>
            </instance>
            <instance id="1">
                <location x="1.0" y="0.0" z="0.0"/>
            </instance>
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        </population>
        <population id="Input_to_L4I" component="SpikeSourcePoisson_Input_to_L4I" size="10" type="populationList">
            <instance id="0">
                <location x="0.0" y="0.0" z="0.0"/>
            </instance>
            <instance id="1">
                <location x="1.0" y="0.0" z="0.0"/>
            </instance>
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        </population>
        <population id="Input_to_L5E" component="SpikeSourcePoisson_Input_to_L5E" size="9" type="populationList">
            <instance id="0">
                <location x="0.0" y="0.0" z="0.0"/>
            </instance>
            <instance id="1">
                <location x="1.0" y="0.0" z="0.0"/>
            </instance>
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        </population>
        <population id="Input_to_L5I" component="SpikeSourcePoisson_Input_to_L5I" size="2" type="populationList">
            <instance id="0">
                <location x="0.0" y="0.0" z="0.0"/>
            </instance>
            <instance id="1">
                <location x="1.0" y="0.0" z="0.0"/>
            </instance>
        </population>
        <population id="Input_to_L6E" component="SpikeSourcePoisson_Input_to_L6E" size="28" type="populationList">
            <instance id="0">
                <location x="0.0" y="0.0" z="0.0"/>
            </instance>
            <instance id="1">
                <location x="1.0" y="0.0" z="0.0"/>
            </instance>
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        </population>
        <population id="Input_to_L6I" component="SpikeSourcePoisson_Input_to_L6I" size="5" type="populationList">
            <instance id="0">
                <location x="0.0" y="0.0" z="0.0"/>
            </instance>
            <instance id="1">
                <location x="1.0" y="0.0" z="0.0"/>
            </instance>
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        </population>
        <projection id="L23E__TO__L23E" presynapticPopulation="L23E" postsynapticPopulation="L23E" synapse="syn__L23E__TO__L23E">
            <connectionWD id="0" preCellId="../L23E/11/IF_curr_exp_L23E" postCellId="../L23E/0/IF_curr_exp_L23E" weight="0.304961404090146" delay="2.1116990767066883ms"/>
            <connectionWD id="1" preCellId="../L23E/29/IF_curr_exp_L23E" postCellId="../L23E/0/IF_curr_exp_L23E" weight="0.308760974342597" delay="1.4575985433980396ms"/>
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        </projection>
        <projection id="L23I__TO__L23E" presynapticPopulation="L23I" postsynapticPopulation="L23E" synapse="syn__L23I__TO__L23E">
            <connectionWD id="0" preCellId="../L23I/8/IF_curr_exp_L23I" postCellId="../L23E/0/IF_curr_exp_L23E" weight="-1.222247580966188" delay="0.15482449508188556ms"/>
            <connectionWD id="1" preCellId="../L23I/3/IF_curr_exp_L23I" postCellId="../L23E/0/IF_curr_exp_L23E" weight="-0.959564805606433" delay="1.2424900929479867ms"/>
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        </projection>
        <projection id="L4E__TO__L23E" presynapticPopulation="L4E" postsynapticPopulation="L23E" synapse="syn__L4E__TO__L23E">
            <connectionWD id="0" preCellId="../L4E/11/IF_curr_exp_L4E" postCellId="../L23E/0/IF_curr_exp_L23E" weight="0.448142117967943" delay="1.4710265244519816ms"/>
            <connectionWD id="1" preCellId="../L4E/9/IF_curr_exp_L4E" postCellId="../L23E/0/IF_curr_exp_L23E" weight="0.526677019760553" delay="2.2927194661045442ms"/>
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        </projection>
        <projection id="L4I__TO__L23E" presynapticPopulation="L4I" postsynapticPopulation="L23E" synapse="syn__L4I__TO__L23E">
            <connectionWD id="0" preCellId="../L4I/8/IF_curr_exp_L4I" postCellId="../L23E/0/IF_curr_exp_L23E" weight="-1.036540521291471" delay="0.5796525177218746ms"/>
            <connectionWD id="1" preCellId="../L4I/3/IF_curr_exp_L4I" postCellId="../L23E/0/IF_curr_exp_L23E" weight="-1.20772691959637" delay="0.37560428068535756ms"/>
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        </projection>
        <projection id="L5E__TO__L23E" presynapticPopulation="L5E" postsynapticPopulation="L23E" synapse="syn__L5E__TO__L23E">
            <connectionWD id="0" preCellId="../L5E/8/IF_curr_exp_L5E" postCellId="../L23E/0/IF_curr_exp_L23E" weight="0.276264994231978" delay="2.5656916183127514ms"/>
            <connectionWD id="1" preCellId="../L5E/3/IF_curr_exp_L5E" postCellId="../L23E/0/IF_curr_exp_L23E" weight="0.285920060363055" delay="1.4062134091484266ms"/>
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        </projection>
        <projection id="L6E__TO__L23E" presynapticPopulation="L6E" postsynapticPopulation="L23E" synapse="syn__L6E__TO__L23E">
            <connectionWD id="0" preCellId="../L6E/24/IF_curr_exp_L6E" postCellId="../L23E/0/IF_curr_exp_L23E" weight="0.298276941643432" delay="0.74284160577138ms"/>
            <connectionWD id="1" preCellId="../L6E/19/IF_curr_exp_L6E" postCellId="../L23E/0/IF_curr_exp_L23E" weight="0.285923096314117" delay="2.41334614974019ms"/>
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        </projection>
        <projection id="L23E__TO__L23I" presynapticPopulation="L23E" postsynapticPopulation="L23I" synapse="syn__L23E__TO__L23I">
            <connectionWD id="0" preCellId="../L23E/0/IF_curr_exp_L23E" postCellId="../L23I/0/IF_curr_exp_L23I" weight="0.298135979196648" delay="1.8006496131777432ms"/>
            <connectionWD id="1" preCellId="../L23E/16/IF_curr_exp_L23E" postCellId="../L23I/0/IF_curr_exp_L23I" weight="0.263752249112563" delay="1.574719903400846ms"/>
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        </projection>
        <projection id="L23I__TO__L23I" presynapticPopulation="L23I" postsynapticPopulation="L23I" synapse="syn__L23I__TO__L23I">
            <connectionWD id="0" preCellId="../L23I/8/IF_curr_exp_L23I" postCellId="../L23I/0/IF_curr_exp_L23I" weight="-1.11540544527055" delay="0.5458192236267354ms"/>
            <connectionWD id="1" preCellId="../L23I/0/IF_curr_exp_L23I" postCellId="../L23I/0/IF_curr_exp_L23I" weight="-1.209733694508895" delay="1.336419976175574ms"/>
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        </projection>
        <projection id="L4E__TO__L23I" presynapticPopulation="L4E" postsynapticPopulation="L23I" synapse="syn__L4E__TO__L23I">
            <connectionWD id="0" preCellId="../L4E/0/IF_curr_exp_L4E" postCellId="../L23I/0/IF_curr_exp_L23I" weight="0.318822580622871" delay="2.1434484642784586ms"/>
            <connectionWD id="1" preCellId="../L4E/42/IF_curr_exp_L4E" postCellId="../L23I/0/IF_curr_exp_L23I" weight="0.271051184657534" delay="0.4104945459346483ms"/>
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        </projection>
        <projection id="L4I__TO__L23I" presynapticPopulation="L4I" postsynapticPopulation="L23I" synapse="syn__L4I__TO__L23I">
            <connectionWD id="0" preCellId="../L4I/8/IF_curr_exp_L4I" postCellId="../L23I/0/IF_curr_exp_L23I" weight="-0.912061356006732" delay="1.0629264568271408ms"/>
            <connectionWD id="1" preCellId="../L4I/0/IF_curr_exp_L4I" postCellId="../L23I/0/IF_curr_exp_L23I" weight="-1.072997371130203" delay="0.45428280608202515ms"/>
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        </projection>
        <projection id="L5E__TO__L23I" presynapticPopulation="L5E" postsynapticPopulation="L23I" synapse="syn__L5E__TO__L23I">
            <connectionWD id="0" preCellId="../L5E/8/IF_curr_exp_L5E" postCellId="../L23I/0/IF_curr_exp_L23I" weight="0.269242353497718" delay="1.9147020954777068ms"/>
            <connectionWD id="1" preCellId="../L5E/0/IF_curr_exp_L5E" postCellId="../L23I/0/IF_curr_exp_L23I" weight="0.286918598359607" delay="0.5453542133389226ms"/>
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        </projection>
        <projection id="L6E__TO__L23I" presynapticPopulation="L6E" postsynapticPopulation="L23I" synapse="syn__L6E__TO__L23I">
            <connectionWD id="0" preCellId="../L6E/24/IF_curr_exp_L6E" postCellId="../L23I/0/IF_curr_exp_L23I" weight="0.23638448977219" delay="1.0538713542439875ms"/>
            <connectionWD id="1" preCellId="../L6E/12/IF_curr_exp_L6E" postCellId="../L23I/0/IF_curr_exp_L23I" weight="0.24254635263232" delay="2.1919632903207766ms"/>
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        </projection>
        <projection id="L23E__TO__L4E" presynapticPopulation="L23E" postsynapticPopulation="L4E" synapse="syn__L23E__TO__L4E">
            <connectionWD id="0" preCellId="../L23E/33/IF_curr_exp_L23E" postCellId="../L4E/0/IF_curr_exp_L4E" weight="0.305535390648616" delay="2.40944283405259ms"/>
            <connectionWD id="1" preCellId="../L23E/29/IF_curr_exp_L23E" postCellId="../L4E/0/IF_curr_exp_L4E" weight="0.28294992044011" delay="2.2678278645369074ms"/>
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        </projection>
        <projection id="L23I__TO__L4E" presynapticPopulation="L23I" postsynapticPopulation="L4E" synapse="syn__L23I__TO__L4E">
            <connectionWD id="0" preCellId="../L23I/8/IF_curr_exp_L23I" postCellId="../L4E/0/IF_curr_exp_L4E" weight="-1.243074433730066" delay="0.9933190784776154ms"/>
            <connectionWD id="1" preCellId="../L23I/3/IF_curr_exp_L23I" postCellId="../L4E/0/IF_curr_exp_L4E" weight="-0.979657705170606" delay="0.9034441724558158ms"/>
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        </projection>
        <projection id="L4E__TO__L4E" presynapticPopulation="L4E" postsynapticPopulation="L4E" synapse="syn__L4E__TO__L4E">
            <connectionWD id="0" preCellId="../L4E/29/IF_curr_exp_L4E" postCellId="../L4E/0/IF_curr_exp_L4E" weight="0.310775563842345" delay="2.574052272611855ms"/>
            <connectionWD id="1" preCellId="../L4E/22/IF_curr_exp_L4E" postCellId="../L4E/0/IF_curr_exp_L4E" weight="0.305024815056385" delay="1.0319983833921584ms"/>
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        </projection>
        <projection id="L4I__TO__L4E" presynapticPopulation="L4I" postsynapticPopulation="L4E" synapse="syn__L4I__TO__L4E">
            <connectionWD id="0" preCellId="../L4I/8/IF_curr_exp_L4I" postCellId="../L4E/0/IF_curr_exp_L4E" weight="-1.163491971202925" delay="0.12860114847651105ms"/>
            <connectionWD id="1" preCellId="../L4I/3/IF_curr_exp_L4I" postCellId="../L4E/0/IF_curr_exp_L4E" weight="-1.041163915973347" delay="0.9696872704440993ms"/>
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        </projection>
        <projection id="L5E__TO__L4E" presynapticPopulation="L5E" postsynapticPopulation="L4E" synapse="syn__L5E__TO__L4E">
            <connectionWD id="0" preCellId="../L5E/8/IF_curr_exp_L5E" postCellId="../L4E/0/IF_curr_exp_L4E" weight="0.316720392271678" delay="1.760826775873662ms"/>
            <connectionWD id="1" preCellId="../L5E/3/IF_curr_exp_L5E" postCellId="../L4E/0/IF_curr_exp_L4E" weight="0.308924701966938" delay="0.28182801641900346ms"/>
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        </projection>
        <projection id="L5I__TO__L4E" presynapticPopulation="L5I" postsynapticPopulation="L4E" synapse="syn__L5I__TO__L4E">
            <connectionWD id="0" preCellId="../L5I/0/IF_curr_exp_L5I" postCellId="../L4E/0/IF_curr_exp_L4E" weight="-1.170555221784292" delay="0.5763081366682306ms"/>
        </projection>
        <projection id="L6E__TO__L4E" presynapticPopulation="L6E" postsynapticPopulation="L4E" synapse="syn__L6E__TO__L4E">
            <connectionWD id="0" preCellId="../L6E/24/IF_curr_exp_L6E" postCellId="../L4E/0/IF_curr_exp_L4E" weight="0.230599402798878" delay="2.214304427390772ms"/>
            <connectionWD id="1" preCellId="../L6E/19/IF_curr_exp_L6E" postCellId="../L4E/0/IF_curr_exp_L4E" weight="0.268735798190331" delay="1.8250459250390696ms"/>
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        </projection>
        <projection id="L23E__TO__L4I" presynapticPopulation="L23E" postsynapticPopulation="L4I" synapse="syn__L23E__TO__L4I">
            <connectionWD id="0" preCellId="../L23E/0/IF_curr_exp_L23E" postCellId="../L4I/0/IF_curr_exp_L4I" weight="0.280133309354283" delay="1.440166504436834ms"/>
            <connectionWD id="1" preCellId="../L23E/16/IF_curr_exp_L23E" postCellId="../L4I/0/IF_curr_exp_L4I" weight="0.216413829495728" delay="2.857925553260963ms"/>
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        </projection>
        <projection id="L23I__TO__L4I" presynapticPopulation="L23I" postsynapticPopulation="L4I" synapse="syn__L23I__TO__L4I">
            <connectionWD id="0" preCellId="../L23I/8/IF_curr_exp_L23I" postCellId="../L4I/0/IF_curr_exp_L4I" weight="-1.077593764736427" delay="1.1320303454184617ms"/>
            <connectionWD id="1" preCellId="../L23I/10/IF_curr_exp_L23I" postCellId="../L4I/0/IF_curr_exp_L4I" weight="-0.97243710870009" delay="0.8964994977696339ms"/>
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        </projection>
        <projection id="L4E__TO__L4I" presynapticPopulation="L4E" postsynapticPopulation="L4I" synapse="syn__L4E__TO__L4I">
            <connectionWD id="0" preCellId="../L4E/0/IF_curr_exp_L4E" postCellId="../L4I/0/IF_curr_exp_L4I" weight="0.3148872955252" delay="1.5803871782743015ms"/>
            <connectionWD id="1" preCellId="../L4E/42/IF_curr_exp_L4E" postCellId="../L4I/0/IF_curr_exp_L4I" weight="0.314393946799913" delay="1.2282633067822808ms"/>
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        </projection>
        <projection id="L4I__TO__L4I" presynapticPopulation="L4I" postsynapticPopulation="L4I" synapse="syn__L4I__TO__L4I">
            <connectionWD id="0" preCellId="../L4I/8/IF_curr_exp_L4I" postCellId="../L4I/0/IF_curr_exp_L4I" weight="-1.174934353071312" delay="1.0231875969602118ms"/>
            <connectionWD id="1" preCellId="../L4I/0/IF_curr_exp_L4I" postCellId="../L4I/0/IF_curr_exp_L4I" weight="-0.932406197922183" delay="0.5440360418243811ms"/>
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        </projection>
        <projection id="L5E__TO__L4I" presynapticPopulation="L5E" postsynapticPopulation="L4I" synapse="syn__L5E__TO__L4I">
            <connectionWD id="0" preCellId="../L5E/8/IF_curr_exp_L5E" postCellId="../L4I/0/IF_curr_exp_L4I" weight="0.259803872101747" delay="2.4759504269775454ms"/>
            <connectionWD id="1" preCellId="../L5E/0/IF_curr_exp_L5E" postCellId="../L4I/0/IF_curr_exp_L4I" weight="0.302648931129227" delay="1.964180430574418ms"/>
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        </projection>
        <projection id="L6E__TO__L4I" presynapticPopulation="L6E" postsynapticPopulation="L4I" synapse="syn__L6E__TO__L4I">
            <connectionWD id="0" preCellId="../L6E/24/IF_curr_exp_L6E" postCellId="../L4I/0/IF_curr_exp_L4I" weight="0.277209398695701" delay="0.4291518887944634ms"/>
            <connectionWD id="1" preCellId="../L6E/12/IF_curr_exp_L6E" postCellId="../L4I/0/IF_curr_exp_L4I" weight="0.259669970113596" delay="1.4110315972528005ms"/>
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        </projection>
        <projection id="L23E__TO__L5E" presynapticPopulation="L23E" postsynapticPopulation="L5E" synapse="syn__L23E__TO__L5E">
            <connectionWD id="0" preCellId="../L23E/0/IF_curr_exp_L23E" postCellId="../L5E/0/IF_curr_exp_L5E" weight="0.253768986657658" delay="1.115060600420685ms"/>
            <connectionWD id="1" preCellId="../L23E/16/IF_curr_exp_L23E" postCellId="../L5E/0/IF_curr_exp_L5E" weight="0.279383883948192" delay="1.901937166411622ms"/>
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        </projection>
        <projection id="L23I__TO__L5E" presynapticPopulation="L23I" postsynapticPopulation="L5E" synapse="syn__L23I__TO__L5E">
            <connectionWD id="0" preCellId="../L23I/8/IF_curr_exp_L23I" postCellId="../L5E/0/IF_curr_exp_L5E" weight="-1.33470473951316" delay="0.873378451220248ms"/>
            <connectionWD id="1" preCellId="../L23I/10/IF_curr_exp_L23I" postCellId="../L5E/0/IF_curr_exp_L5E" weight="-1.278440979471509" delay="0.8293326884707148ms"/>
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        </projection>
        <projection id="L4E__TO__L5E" presynapticPopulation="L4E" postsynapticPopulation="L5E" synapse="syn__L4E__TO__L5E">
            <connectionWD id="0" preCellId="../L4E/0/IF_curr_exp_L4E" postCellId="../L5E/0/IF_curr_exp_L5E" weight="0.294990552187951" delay="1.5847753995337845ms"/>
            <connectionWD id="1" preCellId="../L4E/42/IF_curr_exp_L4E" postCellId="../L5E/0/IF_curr_exp_L5E" weight="0.267136105098334" delay="1.293723842237147ms"/>
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        </projection>
        <projection id="L4I__TO__L5E" presynapticPopulation="L4I" postsynapticPopulation="L5E" synapse="syn__L4I__TO__L5E">
            <connectionWD id="0" preCellId="../L4I/8/IF_curr_exp_L4I" postCellId="../L5E/0/IF_curr_exp_L5E" weight="-1.344800095157005" delay="0.5110658154806673ms"/>
            <connectionWD id="1" preCellId="../L4I/0/IF_curr_exp_L4I" postCellId="../L5E/0/IF_curr_exp_L5E" weight="-1.037847267606163" delay="0.6578375435944831ms"/>
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        </projection>
        <projection id="L5E__TO__L5E" presynapticPopulation="L5E" postsynapticPopulation="L5E" synapse="syn__L5E__TO__L5E">
            <connectionWD id="0" preCellId="../L5E/8/IF_curr_exp_L5E" postCellId="../L5E/0/IF_curr_exp_L5E" weight="0.239361021176793" delay="2.520756675038363ms"/>
            <connectionWD id="1" preCellId="../L5E/0/IF_curr_exp_L5E" postCellId="../L5E/0/IF_curr_exp_L5E" weight="0.276105448609707" delay="1.3847508616357056ms"/>
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        </projection>
        <projection id="L5I__TO__L5E" presynapticPopulation="L5I" postsynapticPopulation="L5E" synapse="syn__L5I__TO__L5E">
            <connectionWD id="0" preCellId="../L5I/0/IF_curr_exp_L5I" postCellId="../L5E/0/IF_curr_exp_L5E" weight="-1.044346486251394" delay="1.0312883679951579ms"/>
            <connectionWD id="1" preCellId="../L5I/0/IF_curr_exp_L5I" postCellId="../L5E/0/IF_curr_exp_L5E" weight="-1.222463102780344" delay="0.6058995881709232ms"/>
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        </projection>
        <projection id="L6E__TO__L5E" presynapticPopulation="L6E" postsynapticPopulation="L5E" synapse="syn__L6E__TO__L5E">
            <connectionWD id="0" preCellId="../L6E/24/IF_curr_exp_L6E" postCellId="../L5E/0/IF_curr_exp_L5E" weight="0.235332610532245" delay="1.6126663466665123ms"/>
            <connectionWD id="1" preCellId="../L6E/12/IF_curr_exp_L6E" postCellId="../L5E/0/IF_curr_exp_L5E" weight="0.256915517455559" delay="1.992546585462323ms"/>
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        </projection>
        <projection id="L23E__TO__L5I" presynapticPopulation="L23E" postsynapticPopulation="L5I" synapse="syn__L23E__TO__L5I">
            <connectionWD id="0" preCellId="../L23E/0/IF_curr_exp_L23E" postCellId="../L5I/0/IF_curr_exp_L5I" weight="0.318041865370578" delay="2.8156267098748224ms"/>
            <connectionWD id="1" preCellId="../L23E/16/IF_curr_exp_L23E" postCellId="../L5I/0/IF_curr_exp_L5I" weight="0.315550080068064" delay="1.5669265529078473ms"/>
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        </projection>
        <projection id="L23I__TO__L5I" presynapticPopulation="L23I" postsynapticPopulation="L5I" synapse="syn__L23I__TO__L5I">
            <connectionWD id="0" preCellId="../L23I/8/IF_curr_exp_L23I" postCellId="../L5I/0/IF_curr_exp_L5I" weight="-1.146829820110277" delay="1.0681056865731446ms"/>
            <connectionWD id="1" preCellId="../L23I/0/IF_curr_exp_L23I" postCellId="../L5I/0/IF_curr_exp_L5I" weight="-1.04891890159432" delay="0.5941220362748325ms"/>
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        </projection>
        <projection id="L4E__TO__L5I" presynapticPopulation="L4E" postsynapticPopulation="L5I" synapse="syn__L4E__TO__L5I">
            <connectionWD id="0" preCellId="../L4E/0/IF_curr_exp_L4E" postCellId="../L5I/0/IF_curr_exp_L5I" weight="0.310701025324959" delay="1.2567707627165163ms"/>
            <connectionWD id="1" preCellId="../L4E/16/IF_curr_exp_L4E" postCellId="../L5I/0/IF_curr_exp_L5I" weight="0.263439587278602" delay="1.4162433343147633ms"/>
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        </projection>
        <projection id="L4I__TO__L5I" presynapticPopulation="L4I" postsynapticPopulation="L5I" synapse="syn__L4I__TO__L5I">
            <connectionWD id="0" preCellId="../L4I/8/IF_curr_exp_L4I" postCellId="../L5I/0/IF_curr_exp_L5I" weight="-1.295245332003813" delay="1.384241411339706ms"/>
            <connectionWD id="1" preCellId="../L4I/0/IF_curr_exp_L4I" postCellId="../L5I/0/IF_curr_exp_L5I" weight="-0.992324408130375" delay="1.3169038616743203ms"/>
        </projection>
        <projection id="L5E__TO__L5I" presynapticPopulation="L5E" postsynapticPopulation="L5I" synapse="syn__L5E__TO__L5I">
            <connectionWD id="0" preCellId="../L5E/8/IF_curr_exp_L5E" postCellId="../L5I/0/IF_curr_exp_L5I" weight="0.205547614857767" delay="2.2195896332712457ms"/>
            <connectionWD id="1" preCellId="../L5E/0/IF_curr_exp_L5E" postCellId="../L5I/0/IF_curr_exp_L5I" weight="0.301184039447275" delay="1.0860865421634218ms"/>
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        </projection>
        <projection id="L5I__TO__L5I" presynapticPopulation="L5I" postsynapticPopulation="L5I" synapse="syn__L5I__TO__L5I">
            <connectionWD id="0" preCellId="../L5I/0/IF_curr_exp_L5I" postCellId="../L5I/0/IF_curr_exp_L5I" weight="-1.228538428019168" delay="0.7012590934702908ms"/>
            <connectionWD id="1" preCellId="../L5I/0/IF_curr_exp_L5I" postCellId="../L5I/0/IF_curr_exp_L5I" weight="-1.024193673294187" delay="1.2132023706114492ms"/>
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        </projection>
        <projection id="L6E__TO__L5I" presynapticPopulation="L6E" postsynapticPopulation="L5I" synapse="syn__L6E__TO__L5I">
            <connectionWD id="0" preCellId="../L6E/24/IF_curr_exp_L6E" postCellId="../L5I/0/IF_curr_exp_L5I" weight="0.259371870779211" delay="2.1294682425256637ms"/>
            <connectionWD id="1" preCellId="../L6E/12/IF_curr_exp_L6E" postCellId="../L5I/0/IF_curr_exp_L5I" weight="0.258785743229684" delay="2.204477774142106ms"/>
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        </projection>
        <projection id="L23E__TO__L6E" presynapticPopulation="L23E" postsynapticPopulation="L6E" synapse="syn__L23E__TO__L6E">
            <connectionWD id="0" preCellId="../L23E/36/IF_curr_exp_L23E" postCellId="../L6E/0/IF_curr_exp_L6E" weight="0.285945403362512" delay="1.3297205773663854ms"/>
            <connectionWD id="1" preCellId="../L23E/17/IF_curr_exp_L23E" postCellId="../L6E/0/IF_curr_exp_L6E" weight="0.276379977736936" delay="1.9405053484106078ms"/>
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        </projection>
        <projection id="L23I__TO__L6E" presynapticPopulation="L23I" postsynapticPopulation="L6E" synapse="syn__L23I__TO__L6E">
            <connectionWD id="0" preCellId="../L23I/8/IF_curr_exp_L23I" postCellId="../L6E/0/IF_curr_exp_L6E" weight="-1.252941917226026" delay="0.4701352805242496ms"/>
            <connectionWD id="1" preCellId="../L23I/3/IF_curr_exp_L23I" postCellId="../L6E/0/IF_curr_exp_L6E" weight="-1.357696657465255" delay="0.40089314568972145ms"/>
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        </projection>
        <projection id="L4E__TO__L6E" presynapticPopulation="L4E" postsynapticPopulation="L6E" synapse="syn__L4E__TO__L6E">
            <connectionWD id="0" preCellId="../L4E/36/IF_curr_exp_L4E" postCellId="../L6E/0/IF_curr_exp_L6E" weight="0.311795186737005" delay="1.5286395829168988ms"/>
            <connectionWD id="1" preCellId="../L4E/17/IF_curr_exp_L4E" postCellId="../L6E/0/IF_curr_exp_L6E" weight="0.256234995860418" delay="2.4554123680665025ms"/>
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        </projection>
        <projection id="L4I__TO__L6E" presynapticPopulation="L4I" postsynapticPopulation="L6E" synapse="syn__L4I__TO__L6E">
            <connectionWD id="0" preCellId="../L4I/8/IF_curr_exp_L4I" postCellId="../L6E/0/IF_curr_exp_L6E" weight="-1.262248800470841" delay="1.070973598956448ms"/>
            <connectionWD id="1" preCellId="../L4I/3/IF_curr_exp_L4I" postCellId="../L6E/0/IF_curr_exp_L6E" weight="-0.89643737884391" delay="0.7981301676851926ms"/>
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        </projection>
        <projection id="L5E__TO__L6E" presynapticPopulation="L5E" postsynapticPopulation="L6E" synapse="syn__L5E__TO__L6E">
            <connectionWD id="0" preCellId="../L5E/8/IF_curr_exp_L5E" postCellId="../L6E/0/IF_curr_exp_L6E" weight="0.270008317801655" delay="1.0920792890666622ms"/>
            <connectionWD id="1" preCellId="../L5E/3/IF_curr_exp_L5E" postCellId="../L6E/0/IF_curr_exp_L6E" weight="0.279587077941912" delay="0.9449235937607547ms"/>
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        </projection>
        <projection id="L5I__TO__L6E" presynapticPopulation="L5I" postsynapticPopulation="L6E" synapse="syn__L5I__TO__L6E">
            <connectionWD id="0" preCellId="../L5I/0/IF_curr_exp_L5I" postCellId="../L6E/0/IF_curr_exp_L6E" weight="-1.192240971023302" delay="0.6322359543871487ms"/>
            <connectionWD id="1" preCellId="../L5I/1/IF_curr_exp_L5I" postCellId="../L6E/0/IF_curr_exp_L6E" weight="-1.291853816318025" delay="1.142103190435956ms"/>
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        </projection>
        <projection id="L6E__TO__L6E" presynapticPopulation="L6E" postsynapticPopulation="L6E" synapse="syn__L6E__TO__L6E">
            <connectionWD id="0" preCellId="../L6E/24/IF_curr_exp_L6E" postCellId="../L6E/0/IF_curr_exp_L6E" weight="0.253424707172656" delay="1.9893157565876889ms"/>
            <connectionWD id="1" preCellId="../L6E/18/IF_curr_exp_L6E" postCellId="../L6E/0/IF_curr_exp_L6E" weight="0.268002191925783" delay="1.1387573867093908ms"/>
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        </projection>
        <projection id="L6I__TO__L6E" presynapticPopulation="L6I" postsynapticPopulation="L6E" synapse="syn__L6I__TO__L6E">
            <connectionWD id="0" preCellId="../L6I/0/IF_curr_exp_L6I" postCellId="../L6E/0/IF_curr_exp_L6E" weight="-0.983635098565154" delay="0.8972283827966012ms"/>
            <connectionWD id="1" preCellId="../L6I/4/IF_curr_exp_L6I" postCellId="../L6E/0/IF_curr_exp_L6E" weight="-1.155362717994532" delay="0.7263273115233239ms"/>
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        </projection>
        <projection id="L23E__TO__L6I" presynapticPopulation="L23E" postsynapticPopulation="L6I" synapse="syn__L23E__TO__L6I">
            <connectionWD id="0" preCellId="../L23E/16/IF_curr_exp_L23E" postCellId="../L6I/0/IF_curr_exp_L6I" weight="0.250347396761221" delay="1.0566569345081303ms"/>
            <connectionWD id="1" preCellId="../L23E/16/IF_curr_exp_L23E" postCellId="../L6I/0/IF_curr_exp_L6I" weight="0.251172731661545" delay="2.757971479747397ms"/>
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        </projection>
        <projection id="L23I__TO__L6I" presynapticPopulation="L23I" postsynapticPopulation="L6I" synapse="syn__L23I__TO__L6I">
            <connectionWD id="0" preCellId="../L23I/8/IF_curr_exp_L23I" postCellId="../L6I/0/IF_curr_exp_L6I" weight="-1.028222165810208" delay="1.0437128908138007ms"/>
            <connectionWD id="1" preCellId="../L23I/0/IF_curr_exp_L23I" postCellId="../L6I/0/IF_curr_exp_L6I" weight="-1.175471058111866" delay="0.624758993940584ms"/>
        </projection>
        <projection id="L4E__TO__L6I" presynapticPopulation="L4E" postsynapticPopulation="L6I" synapse="syn__L4E__TO__L6I">
            <connectionWD id="0" preCellId="../L4E/16/IF_curr_exp_L4E" postCellId="../L6I/0/IF_curr_exp_L6I" weight="0.225257176667217" delay="0.2717607428318678ms"/>
            <connectionWD id="1" preCellId="../L4E/42/IF_curr_exp_L4E" postCellId="../L6I/0/IF_curr_exp_L6I" weight="0.258320395574672" delay="2.2331375475865753ms"/>
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        </projection>
        <projection id="L4I__TO__L6I" presynapticPopulation="L4I" postsynapticPopulation="L6I" synapse="syn__L4I__TO__L6I">
            <connectionWD id="0" preCellId="../L4I/8/IF_curr_exp_L4I" postCellId="../L6I/0/IF_curr_exp_L6I" weight="-1.081529304195608" delay="0.5858734579903129ms"/>
        </projection>
        <projection id="L5E__TO__L6I" presynapticPopulation="L5E" postsynapticPopulation="L6I" synapse="syn__L5E__TO__L6I">
            <connectionWD id="0" preCellId="../L5E/8/IF_curr_exp_L5E" postCellId="../L6I/0/IF_curr_exp_L6I" weight="0.316923438643051" delay="1.516339931748929ms"/>
            <connectionWD id="1" preCellId="../L5E/0/IF_curr_exp_L5E" postCellId="../L6I/0/IF_curr_exp_L6I" weight="0.320236377730548" delay="0.8235597182665229ms"/>
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        </projection>
        <projection id="L5I__TO__L6I" presynapticPopulation="L5I" postsynapticPopulation="L6I" synapse="syn__L5I__TO__L6I">
            <connectionWD id="0" preCellId="../L5I/0/IF_curr_exp_L5I" postCellId="../L6I/0/IF_curr_exp_L6I" weight="-1.07106020031928" delay="0.2746338711504951ms"/>
            <connectionWD id="1" preCellId="../L5I/0/IF_curr_exp_L5I" postCellId="../L6I/0/IF_curr_exp_L6I" weight="-0.99073420960858" delay="0.3259535959356022ms"/>
            <connectionWD id="2" preCellId="../L5I/0/IF_curr_exp_L5I" postCellId="../L6I/0/IF_curr_exp_L6I" weight="-1.243427757958597" delay="0.5918999662218573ms"/>
            <connectionWD id="3" preCellId="../L5I/1/IF_curr_exp_L5I" postCellId="../L6I/2/IF_curr_exp_L6I" weight="-1.374903739534032" delay="1.5091038513813704ms"/>
        </projection>
        <projection id="L6E__TO__L6I" presynapticPopulation="L6E" postsynapticPopulation="L6I" synapse="syn__L6E__TO__L6I">
            <connectionWD id="0" preCellId="../L6E/24/IF_curr_exp_L6E" postCellId="../L6I/0/IF_curr_exp_L6I" weight="0.279076750425366" delay="1.278230037434969ms"/>
            <connectionWD id="1" preCellId="../L6E/12/IF_curr_exp_L6E" postCellId="../L6I/0/IF_curr_exp_L6I" weight="0.30929138546559" delay="1.2450788919494342ms"/>
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        </projection>
        <projection id="L6I__TO__L6I" presynapticPopulation="L6I" postsynapticPopulation="L6I" synapse="syn__L6I__TO__L6I">
            <connectionWD id="0" preCellId="../L6I/0/IF_curr_exp_L6I" postCellId="../L6I/0/IF_curr_exp_L6I" weight="-1.192115240255916" delay="0.6057166602833565ms"/>
            <connectionWD id="1" preCellId="../L6I/4/IF_curr_exp_L6I" postCellId="../L6I/0/IF_curr_exp_L6I" weight="-1.085433563701907" delay="0.7983904644194139ms"/>
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        </projection>
        <projection id="Input_to_L23E__TO__L23E" presynapticPopulation="Input_to_L23E" postsynapticPopulation="L23E" synapse="syn__Input_to_L23E__TO__L23E">
            <connectionWD id="0" preCellId="../Input_to_L23E/0/SpikeSourcePoisson_Input_to_L23E" postCellId="../L23E/0/IF_curr_exp_L23E" weight="0.277674837460456" delay="1.5ms"/>
            <connectionWD id="1" preCellId="../Input_to_L23E/1/SpikeSourcePoisson_Input_to_L23E" postCellId="../L23E/1/IF_curr_exp_L23E" weight="0.277674837460456" delay="1.5ms"/>
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        </projection>
        <projection id="Input_to_L23I__TO__L23I" presynapticPopulation="Input_to_L23I" postsynapticPopulation="L23I" synapse="syn__Input_to_L23I__TO__L23I">
            <connectionWD id="0" preCellId="../Input_to_L23I/0/SpikeSourcePoisson_Input_to_L23I" postCellId="../L23I/0/IF_curr_exp_L23I" weight="0.277674837460456" delay="1.5ms"/>
            <connectionWD id="1" preCellId="../Input_to_L23I/1/SpikeSourcePoisson_Input_to_L23I" postCellId="../L23I/1/IF_curr_exp_L23I" weight="0.277674837460456" delay="1.5ms"/>
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        </projection>
        <projection id="Input_to_L4E__TO__L4E" presynapticPopulation="Input_to_L4E" postsynapticPopulation="L4E" synapse="syn__Input_to_L4E__TO__L4E">
            <connectionWD id="0" preCellId="../Input_to_L4E/0/SpikeSourcePoisson_Input_to_L4E" postCellId="../L4E/0/IF_curr_exp_L4E" weight="0.277674837460456" delay="1.5ms"/>
            <connectionWD id="1" preCellId="../Input_to_L4E/1/SpikeSourcePoisson_Input_to_L4E" postCellId="../L4E/1/IF_curr_exp_L4E" weight="0.277674837460456" delay="1.5ms"/>
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        </projection>
        <projection id="Input_to_L4I__TO__L4I" presynapticPopulation="Input_to_L4I" postsynapticPopulation="L4I" synapse="syn__Input_to_L4I__TO__L4I">
            <connectionWD id="0" preCellId="../Input_to_L4I/0/SpikeSourcePoisson_Input_to_L4I" postCellId="../L4I/0/IF_curr_exp_L4I" weight="0.277674837460456" delay="1.5ms"/>
            <connectionWD id="1" preCellId="../Input_to_L4I/1/SpikeSourcePoisson_Input_to_L4I" postCellId="../L4I/1/IF_curr_exp_L4I" weight="0.277674837460456" delay="1.5ms"/>
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        </projection>
        <projection id="Input_to_L5E__TO__L5E" presynapticPopulation="Input_to_L5E" postsynapticPopulation="L5E" synapse="syn__Input_to_L5E__TO__L5E">
            <connectionWD id="0" preCellId="../Input_to_L5E/0/SpikeSourcePoisson_Input_to_L5E" postCellId="../L5E/0/IF_curr_exp_L5E" weight="0.277674837460456" delay="1.5ms"/>
            <connectionWD id="1" preCellId="../Input_to_L5E/1/SpikeSourcePoisson_Input_to_L5E" postCellId="../L5E/1/IF_curr_exp_L5E" weight="0.277674837460456" delay="1.5ms"/>
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        </projection>
        <projection id="Input_to_L5I__TO__L5I" presynapticPopulation="Input_to_L5I" postsynapticPopulation="L5I" synapse="syn__Input_to_L5I__TO__L5I">
            <connectionWD id="0" preCellId="../Input_to_L5I/0/SpikeSourcePoisson_Input_to_L5I" postCellId="../L5I/0/IF_curr_exp_L5I" weight="0.277674837460456" delay="1.5ms"/>
            <connectionWD id="1" preCellId="../Input_to_L5I/1/SpikeSourcePoisson_Input_to_L5I" postCellId="../L5I/1/IF_curr_exp_L5I" weight="0.277674837460456" delay="1.5ms"/>
        </projection>
        <projection id="Input_to_L6E__TO__L6E" presynapticPopulation="Input_to_L6E" postsynapticPopulation="L6E" synapse="syn__Input_to_L6E__TO__L6E">
            <connectionWD id="0" preCellId="../Input_to_L6E/0/SpikeSourcePoisson_Input_to_L6E" postCellId="../L6E/0/IF_curr_exp_L6E" weight="0.277674837460456" delay="1.5ms"/>
            <connectionWD id="1" preCellId="../Input_to_L6E/1/SpikeSourcePoisson_Input_to_L6E" postCellId="../L6E/1/IF_curr_exp_L6E" weight="0.277674837460456" delay="1.5ms"/>
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        </projection>
        <projection id="Input_to_L6I__TO__L6I" presynapticPopulation="Input_to_L6I" postsynapticPopulation="L6I" synapse="syn__Input_to_L6I__TO__L6I">
            <connectionWD id="0" preCellId="../Input_to_L6I/0/SpikeSourcePoisson_Input_to_L6I" postCellId="../L6I/0/IF_curr_exp_L6I" weight="0.277674837460456" delay="1.5ms"/>
            <connectionWD id="1" preCellId="../Input_to_L6I/1/SpikeSourcePoisson_Input_to_L6I" postCellId="../L6I/1/IF_curr_exp_L6I" weight="0.277674837460456" delay="1.5ms"/>
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        </projection>
    </network>
</neuroml>
