<neuroml xmlns="http://www.neuroml.org/schema/neuroml2"  xmlns:xs="http://www.w3.org/2001/XMLSchema" xmlns:xsi="http://www.w3.org/2001/XMLSchema-instance" xsi:schemaLocation="http://www.neuroml.org/schema/neuroml2 https://raw.github.com/NeuroML/NeuroML2/development/Schemas/NeuroML2/NeuroML_v2beta4.xsd" id="PyNN_NeuroML2_Export">
    <IF_curr_exp id="IF_curr_exp_L6_I" cm="2.500000e-01" i_offset="0.000000e+00" tau_syn_E="5.000000e-01" tau_syn_I="5.000000e-01" v_init="-6.500000e+01" tau_m="1.000000e+01" tau_refrac="2.000000e+00" v_reset="-6.500000e+01" v_rest="-6.500000e+01" v_thresh="-5.000000e+01"/>
    <IF_curr_exp id="IF_curr_exp_L6_E" cm="2.500000e-01" i_offset="0.000000e+00" tau_syn_E="5.000000e-01" tau_syn_I="5.000000e-01" v_init="-6.500000e+01" tau_m="1.000000e+01" tau_refrac="2.000000e+00" v_reset="-6.500000e+01" v_rest="-6.500000e+01" v_thresh="-5.000000e+01"/>
    <IF_curr_exp id="IF_curr_exp_L23_I" cm="2.500000e-01" i_offset="0.000000e+00" tau_syn_E="5.000000e-01" tau_syn_I="5.000000e-01" v_init="-6.500000e+01" tau_m="1.000000e+01" tau_refrac="2.000000e+00" v_reset="-6.500000e+01" v_rest="-6.500000e+01" v_thresh="-5.000000e+01"/>
    <IF_curr_exp id="IF_curr_exp_L23_E" cm="2.500000e-01" i_offset="0.000000e+00" tau_syn_E="5.000000e-01" tau_syn_I="5.000000e-01" v_init="-6.500000e+01" tau_m="1.000000e+01" tau_refrac="2.000000e+00" v_reset="-6.500000e+01" v_rest="-6.500000e+01" v_thresh="-5.000000e+01"/>
    <IF_curr_exp id="IF_curr_exp_L5_I" cm="2.500000e-01" i_offset="0.000000e+00" tau_syn_E="5.000000e-01" tau_syn_I="5.000000e-01" v_init="-6.500000e+01" tau_m="1.000000e+01" tau_refrac="2.000000e+00" v_reset="-6.500000e+01" v_rest="-6.500000e+01" v_thresh="-5.000000e+01"/>
    <IF_curr_exp id="IF_curr_exp_L5_E" cm="2.500000e-01" i_offset="0.000000e+00" tau_syn_E="5.000000e-01" tau_syn_I="5.000000e-01" v_init="-6.500000e+01" tau_m="1.000000e+01" tau_refrac="2.000000e+00" v_reset="-6.500000e+01" v_rest="-6.500000e+01" v_thresh="-5.000000e+01"/>
    <IF_curr_exp id="IF_curr_exp_L4_I" cm="2.500000e-01" i_offset="0.000000e+00" tau_syn_E="5.000000e-01" tau_syn_I="5.000000e-01" v_init="-6.500000e+01" tau_m="1.000000e+01" tau_refrac="2.000000e+00" v_reset="-6.500000e+01" v_rest="-6.500000e+01" v_thresh="-5.000000e+01"/>
    <IF_curr_exp id="IF_curr_exp_L4_E" cm="2.500000e-01" i_offset="0.000000e+00" tau_syn_E="5.000000e-01" tau_syn_I="5.000000e-01" v_init="-6.500000e+01" tau_m="1.000000e+01" tau_refrac="2.000000e+00" v_reset="-6.500000e+01" v_rest="-6.500000e+01" v_thresh="-5.000000e+01"/>
    <network id="network">
        <population id="L6_I" component="IF_curr_exp_L6_I" size="88" type="populationList">
            <instance id="0">
                <location x="-26.736560390688279" y="4.089753548387298" z="10.997021921316774"/>
            </instance>
            <instance id="1">
                <location x="-6.213490010411582" y="-2.527611774085026" z="-26.494850401583726"/>
            </instance>
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        </population>
        <population id="L6_E" component="IF_curr_exp_L6_E" size="431" type="populationList">
            <instance id="0">
                <location x="90.324051092165277" y="-6.431038971549818" z="-83.130788302407055"/>
            </instance>
            <instance id="1">
                <location x="62.793586531970625" y="-106.455227897668237" z="-11.14428903720388"/>
            </instance>
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        </population>
        <population id="L23_I" component="IF_curr_exp_L23_I" size="175" type="populationList">
            <instance id="0">
                <location x="95.026353644848754" y="821.815205205592065" z="-46.757857783940416"/>
            </instance>
            <instance id="1">
                <location x="-90.395507359174033" y="789.500011250649095" z="-37.652826159201005"/>
            </instance>
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        </population>
        <population id="L23_E" component="IF_curr_exp_L23_E" size="620" type="populationList">
            <instance id="0">
                <location x="85.170286556111208" y="779.263580000321554" z="5.877819194353706"/>
            </instance>
            <instance id="1">
                <location x="-77.396515559491647" y="833.228398387195625" z="-70.202869425821035"/>
            </instance>
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        </population>
        <population id="L5_I" component="IF_curr_exp_L5_I" size="31" type="populationList">
            <instance id="0">
                <location x="-38.587804046205967" y="333.286791648598069" z="44.89465033704527"/>
            </instance>
            <instance id="1">
                <location x="77.97897058204417" y="194.664403943699938" z="16.592162059826077"/>
            </instance>
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        </population>
        <population id="L5_E" component="IF_curr_exp_L5_E" size="145" type="populationList">
            <instance id="0">
                <location x="88.701937411796933" y="300.739870287319945" z="-39.714414595332535"/>
            </instance>
            <instance id="1">
                <location x="77.191656522523871" y="289.078702619645583" z="24.83721145607052"/>
            </instance>
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        </population>
        <population id="L4_I" component="IF_curr_exp_L4_I" size="164" type="populationList">
            <instance id="0">
                <location x="40.222453905494881" y="679.344768044136345" z="97.309647647983027"/>
            </instance>
            <instance id="1">
                <location x="84.923876783399635" y="651.255449470391113" z="-90.416383285113056"/>
            </instance>
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        </population>
        <population id="L4_E" component="IF_curr_exp_L4_E" size="657" type="populationList">
            <instance id="0">
                <location x="83.525327664785848" y="584.780093663663592" z="8.189770691365172"/>
            </instance>
            <instance id="1">
                <location x="-26.307698497013376" y="556.520175868653951" z="-42.611639473717624"/>
            </instance>
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        </population>
    </network>
</neuroml>
